// SBML level 3 version 2

model biocrnpyler_289140()
  // model units - substance: mole, time: second, volume: litre, area: square_metre, length: metre, extent: mole

  // Compartments:
  compartment default = 1e-6;

  // Species:
  species dna_dna_Terminator1_forward_dna_J23104_RiboA_forward_dna_UTR2_RBS1_forward_dna_mTagBFP2_forward_dna_UTR3_RBS3_forward_dna_mCherry_forward_dna_UTR1_RBS3_forward_dna_sfGFP_forward_circular_ in default = 0;
  species rna_rna_UTR2_RBS1_forward_rna_mTagBFP2_forward_rna_UTR3_RBS3_forward_rna_mCherry_forward_rna_UTR1_RBS3_forward_rna_sfGFP_forward_rna_Terminator1_forward_ in default = 0;
  species protein_BFP2 in default = 0;
  species protein_mCherry in default = 0;
  species protein_sfGFP in default = 0;

  // Parameters:
  ktx__simple_transcription = 0.1;
  ktl_UTR2_RBS1_simple_translation = 0.06;
  ktl_UTR3_RBS3_simple_translation = 0.6;
  ktl_UTR1_RBS3_simple_translation = 0.6;
  kdil__ = 0.001;
  kdil__rna_degredation = 0.001;

  // Reactions:
  r0: dna_dna_Terminator1_forward_dna_J23104_RiboA_forward_dna_UTR2_RBS1_forward_dna_mTagBFP2_forward_dna_UTR3_RBS3_forward_dna_mCherry_forward_dna_UTR1_RBS3_forward_dna_sfGFP_forward_circular_ => dna_dna_Terminator1_forward_dna_J23104_RiboA_forward_dna_UTR2_RBS1_forward_dna_mTagBFP2_forward_dna_UTR3_RBS3_forward_dna_mCherry_forward_dna_UTR1_RBS3_forward_dna_sfGFP_forward_circular_ + rna_rna_UTR2_RBS1_forward_rna_mTagBFP2_forward_rna_UTR3_RBS3_forward_rna_mCherry_forward_rna_UTR1_RBS3_forward_rna_sfGFP_forward_rna_Terminator1_forward_; ktx__simple_transcription*dna_dna_Terminator1_forward_dna_J23104_RiboA_forward_dna_UTR2_RBS1_forward_dna_mTagBFP2_forward_dna_UTR3_RBS3_forward_dna_mCherry_forward_dna_UTR1_RBS3_forward_dna_sfGFP_forward_circular_;
  r1: rna_rna_UTR2_RBS1_forward_rna_mTagBFP2_forward_rna_UTR3_RBS3_forward_rna_mCherry_forward_rna_UTR1_RBS3_forward_rna_sfGFP_forward_rna_Terminator1_forward_ => rna_rna_UTR2_RBS1_forward_rna_mTagBFP2_forward_rna_UTR3_RBS3_forward_rna_mCherry_forward_rna_UTR1_RBS3_forward_rna_sfGFP_forward_rna_Terminator1_forward_ + protein_BFP2; ktl_UTR2_RBS1_simple_translation*rna_rna_UTR2_RBS1_forward_rna_mTagBFP2_forward_rna_UTR3_RBS3_forward_rna_mCherry_forward_rna_UTR1_RBS3_forward_rna_sfGFP_forward_rna_Terminator1_forward_;
  r2: rna_rna_UTR2_RBS1_forward_rna_mTagBFP2_forward_rna_UTR3_RBS3_forward_rna_mCherry_forward_rna_UTR1_RBS3_forward_rna_sfGFP_forward_rna_Terminator1_forward_ => rna_rna_UTR2_RBS1_forward_rna_mTagBFP2_forward_rna_UTR3_RBS3_forward_rna_mCherry_forward_rna_UTR1_RBS3_forward_rna_sfGFP_forward_rna_Terminator1_forward_ + protein_mCherry; ktl_UTR3_RBS3_simple_translation*rna_rna_UTR2_RBS1_forward_rna_mTagBFP2_forward_rna_UTR3_RBS3_forward_rna_mCherry_forward_rna_UTR1_RBS3_forward_rna_sfGFP_forward_rna_Terminator1_forward_;
  r3: rna_rna_UTR2_RBS1_forward_rna_mTagBFP2_forward_rna_UTR3_RBS3_forward_rna_mCherry_forward_rna_UTR1_RBS3_forward_rna_sfGFP_forward_rna_Terminator1_forward_ => rna_rna_UTR2_RBS1_forward_rna_mTagBFP2_forward_rna_UTR3_RBS3_forward_rna_mCherry_forward_rna_UTR1_RBS3_forward_rna_sfGFP_forward_rna_Terminator1_forward_ + protein_sfGFP; ktl_UTR1_RBS3_simple_translation*rna_rna_UTR2_RBS1_forward_rna_mTagBFP2_forward_rna_UTR3_RBS3_forward_rna_mCherry_forward_rna_UTR1_RBS3_forward_rna_sfGFP_forward_rna_Terminator1_forward_;
  r4: rna_rna_UTR2_RBS1_forward_rna_mTagBFP2_forward_rna_UTR3_RBS3_forward_rna_mCherry_forward_rna_UTR1_RBS3_forward_rna_sfGFP_forward_rna_Terminator1_forward_ => ; kdil__*rna_rna_UTR2_RBS1_forward_rna_mTagBFP2_forward_rna_UTR3_RBS3_forward_rna_mCherry_forward_rna_UTR1_RBS3_forward_rna_sfGFP_forward_rna_Terminator1_forward_;
  r5: protein_BFP2 => ; kdil__*protein_BFP2;
  r6: protein_mCherry => ; kdil__*protein_mCherry;
  r7: protein_sfGFP => ; kdil__*protein_sfGFP;
  r8: rna_rna_UTR2_RBS1_forward_rna_mTagBFP2_forward_rna_UTR3_RBS3_forward_rna_mCherry_forward_rna_UTR1_RBS3_forward_rna_sfGFP_forward_rna_Terminator1_forward_ => ; kdil__rna_degredation*rna_rna_UTR2_RBS1_forward_rna_mTagBFP2_forward_rna_UTR3_RBS3_forward_rna_mCherry_forward_rna_UTR1_RBS3_forward_rna_sfGFP_forward_rna_Terminator1_forward_;

  // Unit definitions:
  unit square_metre = metre^2;
end
